** written by FreeCAD inp file writer for CalculiX,Abaqus meshes
** highest dimension mesh elements only.

** Nodes
*Node, NSET=Nall
1, 0, 0, 8
2, 0, 0, 0
3, 0, 1.5, 8
4, 0, 1.5, 0
5, 1, 0, 8
6, 1, 0, 0
7, 1, 1.5, 8
8, 1, 1.5, 0
9, 0, 0.25, 8
10, 0, 0.5, 8
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

** Volume elements
*Element, TYPE=C3D8R, ELSET=Evolumes
569, 68, 67, 65, 64, 431, 526, 640, 678
570, 431, 526, 640, 678, 430, 525, 639, 677
571, 430, 525, 639, 677, 429, 524, 638, 676
572, 429, 524, 638, 676, 428, 523, 637, 675
573, 428, 523, 637, 675, 427, 522, 636, 674
574, 427, 522, 636, 674, 426, 521, 635, 673
575, 426, 521, 635, 673, 425, 520, 634, 672
576, 425, 520, 634, 672, 424, 519, 633, 671
577, 424, 519, 633, 671, 423, 518, 632, 670
578, 423, 518, 632, 670, 422, 517, 631, 669
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
** Define element set Eall
*ELSET, ELSET=Eall
Evolumes


***********************************************************
** Element sets for materials and FEM element type (solid, shell, beam, fluid)
*ELSET,ELSET=MechanicalMaterialSolid
Evolumes

***********************************************************
** constraints fixed node sets
** Fixed
*NSET,NSET=Fixed
2,
4,
6,
8,
14,
15,
16,
17,
18,
24,
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
** Physical constants for SI(mm) unit system with Kelvins
*PHYSICAL CONSTANTS, ABSOLUTE ZERO=0, STEFAN BOLTZMANN=5.670374419e-11

***********************************************************
** Materials
** see information about units at file end
** FreeCAD material name: CalculiX-Steel
** MechanicalMaterial
*MATERIAL, NAME=MechanicalMaterial
*ELASTIC
210000,0.3

***********************************************************
** Sections
*SOLID SECTION, ELSET=MechanicalMaterialSolid, MATERIAL=MechanicalMaterial

***********************************************************
** At least one step is needed to run an CalculiX analysis of FreeCAD
*STEP
*BUCKLE
10,0.01

***********************************************************
** Fixed Constraints
** Fixed
*BOUNDARY
Fixed,1
Fixed,2
Fixed,3


***********************************************************
** constraints force node loads
** Force
*CLOAD
** node loads on shape: Beam:Face6
1,3,-0.21875
3,3,-0.21875
5,3,-0.21875
7,3,-0.21875
9,3,-0.4375
10,3,-0.4375
11,3,-0.4375
12,3,-0.4375
13,3,-0.4375
19,3,-0.4375
20,3,-0.4375
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

***********************************************************
** Outputs --> frd file
*NODE FILE
U
*EL FILE
S, E
** outputs --> dat file
** reaction forces for Constraint fixed
*NODE PRINT, NSET=Fixed, TOTALS=ONLY
RF

*OUTPUT, FREQUENCY=1
***********************************************************
*END STEP

***********************************************************
** CalculiX Input file
**   written by    --> FreeCAD 26.3.0
**   written on    --> Fri Jul 31 10:05:37 2026
**   file name     -->
**   analysis name --> Analysis
**
**
***********************************************************
**  About units:
**  See ccx manual, ccx does not know about any unit.
**  Golden rule: The user must make sure that the numbers they provide have consistent units.
**  The user is the FreeCAD calculix writer module ;-)
**
**  The unit system which is used at Guido Dhondt's company: mm, N, s, K
**  Since Length and Mass are connected by Force, if Length is mm the Mass is in t to get N
**  The following units are used to write to inp file:
**
**  Length: mm (this includes the mesh geometry)
**  Mass: t
**  TimeSpan: s
**  Temperature: K
**
**  This leads to:
**  Force: N
**  Pressure: N/mm^2 == MPa (Young's Modulus has unit Pressure)
**  Density: t/mm^3
**  Gravity: mm/s^2
**  Thermal conductivity: t*mm/K/s^3 == as W/m/K == kW/mm/K
**  Specific Heat: mm^2/s^2/K = J/kg/K == kJ/t/K
**
